** written by FreeCAD inp file writer for CalculiX,Abaqus meshes
** highest dimension mesh elements only.

** Nodes
*Node, NSET=Nall
1, 0, 0, 10
2, 0, 0, 0
3, 0, 10, 10
4, 0, 10, 0
5, 10, 0, 10
6, 10, 0, 0
7, 10, 10, 10
8, 10, 10, 0
9, 0, 0, 5
10, 0, 0, 2.5
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

** Volume elements
*Element, TYPE=C3D10, ELSET=Evolumes
129, 70, 72, 147, 195, 90, 197, 198, 200, 199, 201
130, 72, 120, 122, 195, 203, 140, 202, 199, 204, 205
131, 148, 98, 95, 195, 207, 114, 206, 209, 208, 210
132, 45, 98, 48, 195, 212, 211, 64, 213, 208, 214
133, 174, 123, 120, 195, 216, 137, 215, 218, 217, 204
134, 45, 46, 174, 195, 66, 219, 220, 213, 221, 218
135, 170, 121, 172, 196, 223, 222, 192, 225, 224, 226
136, 47, 45, 173, 196, 63, 227, 228, 230, 229, 231
137, 99, 146, 95, 196, 233, 232, 117, 235, 234, 236
138, 71, 121, 70, 196, 238, 237, 92, 239, 224, 240
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
** Define element set Eall
*ELSET, ELSET=Eall
Evolumes


***********************************************************
** Element sets for materials and FEM element type (solid, shell, beam, fluid)
*ELSET,ELSET=MechanicalMaterialSolid
Evolumes

***********************************************************
** constraints fixed node sets
** FemConstraintFixed
*NSET,NSET=FemConstraintFixed
1,
2,
3,
4,
9,
10,
11,
12,
13,
14,
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
** Physical constants for SI(mm) unit system with Kelvins
*PHYSICAL CONSTANTS, ABSOLUTE ZERO=0, STEFAN BOLTZMANN=5.670374419e-11

***********************************************************
** Materials
** see information about units at file end
** FreeCAD material name: Steel-Generic
** MechanicalMaterial
*MATERIAL, NAME=MechanicalMaterial
*ELASTIC
200000,0.3
*EXPANSION, ZERO=0
0

***********************************************************
** Sections
*SOLID SECTION, ELSET=MechanicalMaterialSolid, MATERIAL=MechanicalMaterial

***********************************************************
** At least one step is needed to run an CalculiX analysis of FreeCAD
*STEP, INC=2000
*STATIC
1.0,1.0,1e-05,1.0

***********************************************************
** Fixed Constraints
** FemConstraintFixed
*BOUNDARY
FemConstraintFixed,1
FemConstraintFixed,2
FemConstraintFixed,3


***********************************************************
** constraints force node loads
** FemConstraintForce
*CLOAD
** node loads on shape: Box:Face6
1,3,-0
3,3,-0
5,3,-0
7,3,-0
12,3,-0
13,3,-833.3333333333
14,3,-833.3333333333
24,3,-0
25,3,-833.3333333333
26,3,-833.3333333333
36,3,-0
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

***********************************************************
** constraints pressure element face loads
** FemConstraintPressure
*DLOAD
** Box.Face2
147,P1,1000.0
158,P2,1000.0
159,P4,1000.0
161,P2,1000.0
209,P1,1000.0
212,P1,1000.0
213,P1,1000.0
214,P1,1000.0
243,P2,1000.0
244,P3,1000.0
245,P2,1000.0
246,P2,1000.0
248,P4,1000.0
249,P3,1000.0
250,P4,1000.0
252,P2,1000.0

***********************************************************
** Outputs --> frd file
*NODE FILE
U
*EL FILE
S, E
** outputs --> dat file
** reaction forces for Constraint fixed
*NODE PRINT, NSET=FemConstraintFixed, TOTALS=ONLY
RF

*OUTPUT, FREQUENCY=1
***********************************************************
*END STEP

***********************************************************
** CalculiX Input file
**   written by    --> FreeCAD 1.2.0
**   written on    --> Fri May 15 16:32:34 2026
**   file name     -->
**   analysis name --> Analysis
**
**
***********************************************************
**  About units:
**  See ccx manual, ccx does not know about any unit.
**  Golden rule: The user must make sure that the numbers they provide have consistent units.
**  The user is the FreeCAD calculix writer module ;-)
**
**  The unit system which is used at Guido Dhondt's company: mm, N, s, K
**  Since Length and Mass are connected by Force, if Length is mm the Mass is in t to get N
**  The following units are used to write to inp file:
**
**  Length: mm (this includes the mesh geometry)
**  Mass: t
**  TimeSpan: s
**  Temperature: K
**
**  This leads to:
**  Force: N
**  Pressure: N/mm^2 == MPa (Young's Modulus has unit Pressure)
**  Density: t/mm^3
**  Gravity: mm/s^2
**  Thermal conductivity: t*mm/K/s^3 == as W/m/K == kW/mm/K
**  Specific Heat: mm^2/s^2/K = J/kg/K == kJ/t/K
**
