** written by FreeCAD inp file writer for CalculiX,Abaqus meshes
** highest dimension mesh elements only.

** Nodes
*Node, NSET=Nall
1, 25, -6e-15, 500
2, 25, -6e-15, 0
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

** Face elements
*Element, TYPE=S3, ELSET=Efaces
329, 327, 329, 328
330, 330, 332, 331
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
** Define element set Eall
*ELSET, ELSET=Eall
Efaces


***********************************************************
** Element sets for materials and FEM element type (solid, shell, beam, fluid)
*ELSET,ELSET=MechanicalMaterialShellThickness
Efaces

***********************************************************
** constraints fixed node sets
** ConstraintFixed
*NSET,NSET=ConstraintFixed
2,
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
***********************************************************
** constraints contact surface sets
** ConstraintContact
*SURFACE, NAME=DEPConstraintContact
329,S2
330,S2
331,S2
332,S2
333,S2
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7826,S2
*SURFACE, NAME=INDConstraintContact
7827,S2
7828,S2
7829,S2
7830,S2
7831,S2
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15604,S2

** Physical constants for SI(mm) unit system with Kelvins
*PHYSICAL CONSTANTS, ABSOLUTE ZERO=0, STEFAN BOLTZMANN=5.670374419e-11

***********************************************************
** Materials
** see information about units at file end
** FreeCAD material name: AlCuMgPb
** MechanicalMaterial
*MATERIAL, NAME=MechanicalMaterial
*ELASTIC
72000,0.3

***********************************************************
** Sections
*SHELL SECTION, ELSET=MechanicalMaterialShellThickness, MATERIAL=MechanicalMaterial
0.5

***********************************************************
** Contact Constraints
** ConstraintContact
*CONTACT PAIR, INTERACTION=INTConstraintContact, TYPE=SURFACE TO SURFACE
DEPConstraintContact, INDConstraintContact
*SURFACE INTERACTION, NAME=INTConstraintContact
*SURFACE BEHAVIOR, PRESSURE-OVERCLOSURE=LINEAR
1000000

***********************************************************
** At least one step is needed to run an CalculiX analysis of FreeCAD
*STEP, INC=2000
*STATIC


***********************************************************
** Fixed Constraints
** ConstraintFixed
*BOUNDARY
ConstraintFixed,1
ConstraintFixed,2
ConstraintFixed,3
ConstraintFixed,4
ConstraintFixed,5
ConstraintFixed,6


***********************************************************
** constraints force node loads
*CLOAD
** ConstraintForce
** node load on shape: Load_place_point:Vertex1
5,2,-5000


***********************************************************
** Outputs --> frd file
*NODE FILE, OUTPUT=3d
U
*EL FILE
S, E
** outputs --> dat file
** reaction forces for Constraint fixed
*NODE PRINT, NSET=ConstraintFixed, TOTALS=ONLY
RF

*OUTPUT, FREQUENCY=1
***********************************************************
*END STEP

***********************************************************
** CalculiX Input file
**   written by    --> FreeCAD 0.21.0
**   written on    --> Tue Mar 28 05:18:47 2023
**   file name     --> Contact_Shell_Shell.FCStd
**   analysis name --> Analysis
**
**
***********************************************************
**  About units:
**  See ccx manual, ccx does not know about any unit.
**  Golden rule: The user must make sure that the numbers they provide have consistent units.
**  The user is the FreeCAD calculix writer module ;-)
**
**  The unit system which is used at Guido Dhondt's company: mm, N, s, K
**  Since Length and Mass are connected by Force, if Length is mm the Mass is in t to get N
**  The following units are used to write to inp file:
**
**  Length: mm (this includes the mesh geometry)
**  Mass: t
**  TimeSpan: s
**  Temperature: K
**
**  This leads to:
**  Force: N
**  Pressure: N/mm^2 == MPa (Young's Modulus has unit Pressure)
**  Density: t/mm^3
**  Gravity: mm/s^2
**  Thermal conductivity: t*mm/K/s^3 == as W/m/K == kW/mm/K
**  Specific Heat: mm^2/s^2/K = J/kg/K == kJ/t/K
**
