** written by FreeCAD inp file writer for CalculiX,Abaqus meshes
** highest dimension mesh elements only.

** Nodes
*Node, NSET=Nall
1, 40, 0, 0
2, 40, 0, 10
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

** Volume elements
*Element, TYPE=C3D10, ELSET=Evolumes
819, 786, 1282, 751, 6254, 6319, 6318, 967, 6321, 6320, 6322
820, 1270, 1766, 1302, 6254, 6324, 6323, 1386, 6326, 6325, 6327
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
** Define element set Eall
*ELSET, ELSET=Eall
Evolumes


***********************************************************
** Element sets for materials and FEM element type (solid, shell, beam, fluid)
*ELSET,ELSET=FemMaterial1Solid
819,
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*ELSET,ELSET=FemMaterial2Solid
6676,
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*ELSET,ELSET=FemMaterial3Solid
2285,
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
***********************************************************
** constraints fixed node sets
** ConstraintFixed
*NSET,NSET=ConstraintFixed
13,
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
***********************************************************
** Materials
** Young's modulus unit is MPa = N/mm2
** FreeCAD material name: Concrete-Generic
** FemMaterial1
*MATERIAL, NAME=FemMaterial1
*ELASTIC
32000, 0.170
** FreeCAD material name: PLA
** FemMaterial2
*MATERIAL, NAME=FemMaterial2
*ELASTIC
3640, 0.360
** FreeCAD material name: Steel-Generic
** FemMaterial3
*MATERIAL, NAME=FemMaterial3
*ELASTIC
200000, 0.300

***********************************************************
** Sections
*SOLID SECTION, ELSET=FemMaterial1Solid, MATERIAL=FemMaterial1
*SOLID SECTION, ELSET=FemMaterial2Solid, MATERIAL=FemMaterial2
*SOLID SECTION, ELSET=FemMaterial3Solid, MATERIAL=FemMaterial3

***********************************************************
** At least one step is needed to run an CalculiX analysis of FreeCAD
*STEP
*STATIC


***********************************************************
** Fixed Constraints
** ConstraintFixed
*BOUNDARY
ConstraintFixed,1
ConstraintFixed,2
ConstraintFixed,3


***********************************************************
** constraints force node loads
*CLOAD
** ConstraintForce
** node loads on shape: Box1:Face6
17,3,-0.0000000000000E+00
19,3,-0.0000000000000E+00
22,3,-0.0000000000000E+00
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4663,3,-9.4766171490837E+00

** node loads on shape: Box2:Face6
2,3,-0.0000000000000E+00
4,3,-0.0000000000000E+00
22,3,-0.0000000000000E+00
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5983,3,-9.2223504663620E+00

** node loads on shape: Box3:Face6
2,3,-0.0000000000000E+00
4,3,-0.0000000000000E+00
6,3,-0.0000000000000E+00
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1490,3,-8.0962155333238E+00

** node loads on shape: Box4:Face6
6,3,-0.0000000000000E+00
8,3,-0.0000000000000E+00
10,3,-0.0000000000000E+00
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3789,3,-7.6126461889495E+00

** node loads on shape: Box5:Face6
10,3,-0.0000000000000E+00
12,3,-0.0000000000000E+00
14,3,-0.0000000000000E+00
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2712,3,-9.7397546125400E+00


***********************************************************
** Outputs --> frd file
*NODE FILE
U
*EL FILE
S, E
** outputs --> dat file
** reaction forces for Constraint fixed
*NODE PRINT, NSET=ConstraintFixed, TOTALS=ONLY
RF


***********************************************************
*END STEP

***********************************************************
** CalculiX Input file
**   written by    --> FreeCAD 0.19.21802 +11 (Git)
**   written on    --> Fri Jul  3 22:09:27 2020
**   file name     -->
**   analysis name --> Analysis
**
**
***********************************************************
**  About units:
**  See ccx manual, ccx does not know about any unit.
**  Golden rule: The user must make sure that the numbers he provides have consistent units.
**  The user is the FreeCAD calculix writer module ;-)
**
**  The unit system which is used at Guido Dhondt's company: mm, N, s, K
**  Since Length and Mass are connected by Force, if Length is mm the Mass is in t to get N
**  The following units are used to write to inp file:
**
**  Length: mm (this includes the mesh geometry)
**  Mass: t
**  TimeSpan: s
**  Temperature: K
**
**  This leads to:
**  Force: N
**  Pressure: N/mm^2
**  Density: t/mm^3
**  Gravity: mm/s^2
**  Thermal conductivity: t*mm/K/s^3 (same as W/m/K)
**  Specific Heat: mm^2/s^2/K (same as J/kg/K)
**
