** written by FreeCAD inp file writer for CalculiX,Abaqus meshes
** highest dimension mesh elements only.

** Nodes
*Node, NSET=Nall
1, -200, -100, 0
2, -200, -100, 10
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

** Volume elements
*Element, TYPE=C3D10, ELSET=Evolumes
4758, 5661, 5549, 1973, 8906, 7768, 8916, 8917, 8919, 8918, 8920
4759, 5515, 2117, 1827, 8908, 8922, 3556, 8921, 8924, 8923, 8925
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
** Define element set Eall
*ELSET, ELSET=Eall
Evolumes


***********************************************************
** Element sets for materials and FEM element type (solid, shell, beam, fluid)
** written by write_element_sets_material_and_femelement_type function
*ELSET,ELSET=Material_linSolid
Evolumes

***********************************************************
** constraints fixed node sets
** written by write_node_sets_constraints_fixed function
** ConstraintFixed
*NSET,NSET=ConstraintFixed
1,
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
***********************************************************
** Materials
** written by write_materials function
** Young's modulus unit is MPa = N/mm2
** FreeCAD material name: CalculiX-Steel
** Material_lin
*MATERIAL, NAME=Material_lin
*ELASTIC
210000, 0.300
*PLASTIC
240.0, 0.0
270.0, 0.025


***********************************************************
** Sections
** written by write_femelementsets function
*SOLID SECTION, ELSET=Material_linSolid, MATERIAL=Material_lin

***********************************************************
** At least one step is needed to run an CalculiX analysis of FreeCAD
** written by write_step_begin function
*STEP, NLGEOM
*STATIC


***********************************************************
** Fixed Constraints
** written by write_constraints_fixed function
** ConstraintFixed
*BOUNDARY
ConstraintFixed,1
ConstraintFixed,2
ConstraintFixed,3


***********************************************************
** Element + CalculiX face + load in [MPa]
** written by write_constraints_pressure function
** ConstraintPressure
*DLOAD
** ConstraintPressure: face load
4796,P3,-130.0
4799,P4,-130.0
4872,P4,-130.0
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11158,P4,-130.0

***********************************************************
** Outputs --> frd file
** written by write_outputs_types function
*NODE FILE
U
*EL FILE
S, E, PEEQ
** outputs --> dat file
** reaction forces for Constraint fixed
*NODE PRINT, NSET=ConstraintFixed, TOTALS=ONLY
RF


***********************************************************
** written by write_step_end function
*END STEP

***********************************************************
** CalculiX Input file
** written by write_footer function
**   written by    --> FreeCAD 0.19.19432 (Git)
**   written on    --> Fri Jan 31 08:04:49 2020
**   file name     -->
**   analysis name --> Analysis
**
**
**
**   Units
**
**   Geometry (mesh data)        --> mm
**   Materials (Young's modulus) --> N/mm2 = MPa
**   Loads (nodal loads)         --> N
**
